// SBML level 2 version 4

function Constant_flux__irreversible(v)
  v;
end
Constant_flux__irreversible is "Constant flux (irreversible)";

model MODEL1512100001()
  // Karapetyan2016 - Genetic oscillatory network - Repressor Titration Circuit (RTC)
  // This model is described in the article:
  // Role of DNA binding sites and slow unbinding kinetics in titration-based oscillators.
  // Karapetyan S, Buchler NE.
  // Phys Rev E Stat Nonlin Soft Matter Phys 2015 Dec; 92(6-1): 062712
  // Abstract:
  // Genetic oscillators, such as circadian clocks, are constantly perturbed by molecular noise arising from the small number of molecules involved in gene regulation. One of the strongest sources of stochasticity is the binary noise that arises from the binding of a regulatory protein to a promoter in the chromosomal DNA. In this study, we focus on two minimal oscillators based on activator titration and repressor titration to understand the key parameters that are important for oscillations and for overcoming binary noise. We show that the rate of unbinding from the DNA, despite traditionally being considered a fast parameter, needs to be slow to broaden the space of oscillatory solutions. The addition of multiple, independent DNA binding sites further expands the oscillatory parameter space for the repressor-titration oscillator and lengthens the period of both oscillators. This effect is a combination of increased effective delay of the unbinding kinetics due to multiple binding sites and increased promoter ultrasensitivity that is specific for repression. We then use stochastic simulation to show that multiple binding sites increase the coherence of oscillations by mitigating the binary noise. Slow values of DNA unbinding rate are also effective in alleviating molecular noise due to the increased distance from the bifurcation point. Our work demonstrates how the number of DNA binding sites and slow unbinding kinetics, which are often omitted in biophysical models of gene circuits, can have a significant impact on the temporal and stochastic dynamics of genetic oscillators.
  // This model is hosted on BioModels Database and identified by: BIOMD0000000587.
  // To cite BioModels Database, please use: BioModels Database: An enhanced, curated and annotated resource for published quantitative kinetic models.
  // To the extent possible under law, all copyright and related or neighbouring rights to this encoded model have been dedicated to the public domain worldwide. Please refer to CC0 Public Domain Dedication for more information.
  // biomodels.db:MODEL1512100001
  // biomodels.db:BIOMD0000000587
  // isDescribedBy pubmed:26764732
  // isVersionOf GO:0010468
  // hasTaxon taxonomy:4932
  // hasProperty mamo:MAMO_0000046

  // Compartments:
  compartment yeast = 1;  // isVersionOf GO:0005623

  // Species:
  species G0 in yeast = 1;
  species G1 in yeast = 0;
  species rR in yeast = 0;
  species I in yeast = 0;
  species rI in yeast = 0;
  species R in yeast = 0;
  species RI in yeast = 0;
  species R2 in yeast = 0;
  species G2 in yeast = 0;
  species G3 in yeast = 0;

  // Parameters:
  Theta = 0.02;
  rho_f = 0.8928;
  beta = 14.109;
  delta_m = 0.0159;
  delta_p = 0.0077;
  gamma = 0.025;
  epsilon = 0.024;
  epsilon_1 = 6;
  _3sites = 0;
  f = 3.63;
  Initial_for_3sites = _3sites;
  Initial_for_Alpha = Alpha;
  Initial_for_Theta = Theta;
  Initial_for_f = f;
  Initial_for_rho_b = rho_b;
  Initial_for_rho_f = rho_f;

  // Assignment rules:
  Alpha := Initial_for_Theta/(24*3.344);
  rho_b := Initial_for_rho_f/Initial_for_f;
  rho_0 := sqrt(Initial_for_rho_b*Initial_for_rho_f);
  a_01 := piecewise(3*Initial_for_Alpha, Initial_for_3sites == 1, Initial_for_Alpha);
  a_12 := piecewise(2*Initial_for_Alpha, Initial_for_3sites == 1, 0);
  a_23 := piecewise(1*Initial_for_Alpha, Initial_for_3sites == 1, 0);
  t_10 := Initial_for_Theta;
  t_21 := piecewise(2*Initial_for_Theta, Initial_for_3sites == 1, 0);
  t_32 := piecewise(3*Initial_for_Theta, Initial_for_3sites == 1, 0);

  // Reactions:
  G1____G0___R2: G1 => G0 + R2; yeast*t_10*G1; G1____G0___R2 is "G1 -> G0 + R2";
  G0___R2____G1: G0 + R2 => G1; yeast*a_01*G0*R2; G0___R2____G1 is "G0 + R2 -> G1";
  G0____G0___rR: G0 => G0 + rR; yeast*rho_f*G0; G0____G0___rR is "G0 -> G0 + rR";
  G1____G1___rR: G1 => G1 + rR; yeast*rho_b*G1; G1____G1___rR is "G1 -> G1 + rR";
  rR___: rR => ; yeast*delta_m*rR; rR___ is "rR ->";
  ____rI: => rI; yeast*Constant_flux__irreversible(rho_0); ____rI is "-> rI";
  rI___: rI => ; yeast*delta_m*rI; rI___ is "rI ->";
  rR____rR___R: rR => rR + R; yeast*beta*rR; rR____rR___R is "rR -> rR + R";
  I___: I => ; yeast*delta_p*I; I___ is "I ->";
  rI____rI___I: rI => rI + I; yeast*beta*rI; rI____rI___I is "rI -> rI + I";
  R___: R => ; yeast*delta_p*R; R___ is "R ->";
  R___I____RI: R + I => RI; yeast*gamma*R*I; R___I____RI is "R + I -> RI";
  _2___R____R2: 2 R => R2; yeast*gamma*R^2; _2___R____R2 is "2 * R -> R2";
  R2____2___R: R2 => 2 R; yeast*epsilon_1*R2; R2____2___R is "R2 -> 2 * R";
  RI____R___I: RI => R + I; yeast*epsilon*RI; RI____R___I is "RI -> R + I";
  RI___: RI => ; yeast*delta_p*RI; RI___ is "RI ->";
  R2___: R2 => ; yeast*delta_p*R2; R2___ is "R2 ->";
  G1___R2____G2: G1 + R2 => G2; yeast*a_12*G1*R2; G1___R2____G2 is "G1 + R2 -> G2";
  G2____G1___R2: G2 => G1 + R2; yeast*t_21*G2; G2____G1___R2 is "G2 -> G1 + R2";
  G2____G2___rR: G2 => G2 + rR; yeast*rho_b*G2; G2____G2___rR is "G2 -> G2 + rR";
  G2___R2____G3: G2 + R2 => G3; yeast*a_23*G2*R2; G2___R2____G3 is "G2 + R2 -> G3";
  G3____G2___R2: G3 => G2 + R2; yeast*t_32*G3; G3____G2___R2 is "G3 -> G2 + R2";
  G3____G3___rR: G3 => G3 + rR; yeast*rho_b*G3; G3____G3___rR is "G3 -> G3 + rR";

  // Unit definitions:
  unit volume = dimensionless;
  unit time = 60 second;
  unit substance = item;
end
